# OpenSim document version 40000
ExternalLoads phase1a_grf_suit:
  datafile: ext_grf_suit.mot
  ExternalForce grf_R: applied_to_body=calcn_r force_expressed_in_body=ground point_expressed_in_body=ground
      force_identifier=ground_force_R_v point_identifier=ground_force_R_p torque_identifier=ground_torque_R_
      data_source_name=ext_grf_suit.mot
  ExternalForce grf_L: applied_to_body=calcn_l force_expressed_in_body=ground point_expressed_in_body=ground
      force_identifier=ground_force_L_v point_identifier=ground_force_L_p torque_identifier=ground_torque_L_
      data_source_name=ext_grf_suit.mot
  ExternalForce suit_thoracic: applied_to_body=thoracic1 force_expressed_in_body=ground point_expressed_in_body=ground
      force_identifier=thor_F_v point_identifier=thor_P_p torque_identifier=thor_T_ data_source_name=ext_grf_suit.mot
  ExternalForce suit_pelvis: applied_to_body=pelvis force_expressed_in_body=ground point_expressed_in_body=ground
      force_identifier=pel_F_v point_identifier=pel_P_p torque_identifier=pel_T_ data_source_name=ext_grf_suit.mot
